# Вариант 2
# [area: Лаб 6]
a[0] := 15
a[1] := 15
a[2] := 9
m[0] := 570
m[1] := 576
m[2] := 445
b[0] := 30
b[1] := 25
b[2] := 4
c[0] := 8
c[1] := 10
f(x[1], x[2]) == c[0]*x[0] + c[1]*x[1]
a[0]*x[0] + b[0]*x[1] ≤ m[0]
a[1]*x[0] + b[1]*x[1] ≤ m[1]
a[2]*x[0] + b[2]*x[0] ≤ m[2]
x[0], x[1] ≥ 0
n := 1
f(x) := sum(c[i]*x[i], i = 0 .. n)
x[0] := 0
x[1] := 0
Given
a*x[0] + b*x[1] ≤ m
x ≥ 0
x := Maximize(f, x)
x = [38; 0]
f(x) = 304
# Результат совпадет с 6лаб
# [area: Лаб 9]
a := [4; 5; 7]
b := [6; 8; 2]
c := [7, 4, 5; 6, 3, 4; 4, 6, 5]
n := 2
x := [0, 0, 0; 0, 0, 0; 0, 0, 0]
f(x) := sum(sum(c[i, j]*x[i, j], j = 0 .. n), i = 0 .. n)
Given
x[0, 0] + x[0, 1] + x[0, 2] == a[0]
x[1, 0] + x[1, 1] + x[1, 2] == a[1]
x[2, 0] + x[2, 1] + x[2, 2] == a[2]
x[0, 0] + x[1, 0] + x[2, 0] == b[0]
x[0, 1] + x[1, 1] + x[2, 1] == b[1]
x[0, 2] + x[1, 2] + x[2, 2] == b[2]
x ≥ 0
x := Minimize(f, x)
x = [0, 3, 1; 0, 5, 0; 6, 0, 1]
f(x) = 61
# Результат совпадет с 9лаб
# [area: Лаб 10 мин]
c := [5, 2, 3, 8, 5; 7, 8, 6, 1, 3; 9, 0, 2, 4, 7; 5, 5, 7, 2, 3; 4, 1, 4, 5, 3]
x := [0, 0, 0, 0, 0; 0, 0, 0, 0, 0; 0, 0, 0, 0, 0; 0, 0, 0, 0, 0; 0, 0, 0, 0, 0]
n := 4
f(x) := sum(sum(c[i, j]*x[i, j], j = 0 .. n), i = 0 .. n)
Given
sum(x[0, j], j = 0 .. n) == 1
sum(x[1, j], j = 0 .. n) == 1
sum(x[2, j], j = 0 .. n) == 1
sum(x[3, j], j = 0 .. n) == 1
sum(x[4, j], j = 0 .. n) == 1
sum(x[i, 0], i = 0 .. n) == 1
sum(x[i, 1], i = 0 .. n) == 1
sum(x[i, 2], i = 0 .. n) == 1
sum(x[i, 3], i = 0 .. n) == 1
sum(x[i, 4], i = 0 .. n) == 1
x ≥ 0
x := Minimize(f, x)
x = [0, 0, 1, 0, 0; 0, 0, 0, 1, 0; 0, 1, 0, 0, 0; 0, 0, 0, 0, 1; 1, 0, 0, 0, 0]
f(x) = 11
# Результат совпадет с 10лаб
# [area: Лаб 10 макс]
c := [5, 2, 3, 8, 5; 7, 8, 6, 1, 3; 9, 0, 2, 4, 7; 5, 5, 7, 2, 3; 4, 1, 4, 5, 3]
x := [0, 0, 0, 0, 0; 0, 0, 0, 0, 0; 0, 0, 0, 0, 0; 0, 0, 0, 0, 0; 0, 0, 0, 0, 0]
n := 4
f(x) := sum(sum(c[i, j]*x[i, j], j = 0 .. n), i = 0 .. n)
Given
sum(x[0, j], j = 0 .. n) == 1
sum(x[1, j], j = 0 .. n) == 1
sum(x[2, j], j = 0 .. n) == 1
sum(x[3, j], j = 0 .. n) == 1
sum(x[4, j], j = 0 .. n) == 1
sum(x[i, 0], i = 0 .. n) == 1
sum(x[i, 1], i = 0 .. n) == 1
sum(x[i, 2], i = 0 .. n) == 1
sum(x[i, 3], i = 0 .. n) == 1
sum(x[i, 4], i = 0 .. n) == 1
x ≥ 0
x := Maximize(f, x)
x = [0, 0, 0, 1, 0; 0, 1, 0, 0, 0; 1, 0, 0, 0, 0; 0, 0, 1, 0, 0; 0, 0, 0, 0, 1]
f(x) = 35
# Результат совпадет с 10лаб
